# OpenSim document version 40000
Model LaiArnold2017_Simplified:
  gravity: 0 -9.80665 0
  length_units: meters
  force_units: N
  credits:
    Rajagopal Model w/ torso, updated knee, modified for movements involving high hip and knee flexion
  publications:
    Lai,A.K.M., Arnold, A.S., Wakeling, J.M. (2017) Why are antagonist muscles co-activated in my simulation? A musculoskeletal model for analysing human locomotor tasks. Annals of Biomedical Engineering
  Ground:
    PhysicalOffsetFrame StoolFrame: socket_parent=.. translation=(-0.1 0 0) [meters]
        orientation=(-1.570796 0 0) [radians] meshes=stool_small.stl
    PhysicalOffsetFrame chairContactFrame: socket_parent=.. translation=(0 0.45 0)
  BodySet:
    Body pelvis: mass=11.777 [kg] mass_center=(-0.0707 0 0) inertia=(0.1028 0.0871 0.0579 0 0 0)
        meshes=(r_pelvis.vtp l_pelvis.vtp)
      PhysicalOffsetFrame pelvis_cnctFrame: socket_parent=.. translation=(-0.075 -0.1 0)
      WrapCylinder Gmax2_at_pelvis_r: xyz_body_rotation=(-0.75 0.39 0) translation=(-0.08 -0.083 0.068) quadrant=all
          radius=0.04 length=0.1
      WrapCylinder Gmax2_at_pelvis_l: xyz_body_rotation=(0.75 -0.39 0) translation=(-0.08 -0.083 -0.068) quadrant=all
          radius=0.04 length=0.1
      WrapCylinder PS_at_brim_r: xyz_body_rotation=(-0.25 -0.27 0.1) translation=(-0.074 -0.06 0.0656) quadrant=-y
          radius=0.05 length=0.1
      WrapCylinder PS_at_brim_l: xyz_body_rotation=(0.25 0.27 0.1) translation=(-0.074 -0.06 -0.0656) quadrant=-y
          radius=0.05 length=0.1
    Body sacrum: mass=0 mass_center=(0 0 0) inertia=(0 0 0 0 0 0) meshes=sacrum.vtp
    Body femur_r: mass=9.3014 mass_center=(0 -0.17 0) inertia=(0.1339 0.0351 0.1412 0 0 0) meshes=r_femur.vtp
      WrapCylinder GasMed_at_condyles_r: translation=(0.005 -0.41 0) quadrant=all radius=0.025 length=0.1
      WrapCylinder KnExt_at_fem_r: xyz_body_rotation=(-0.0623366 0.0507601 0)
          translation=(0.00358828 -0.402732 0.00209111) quadrant=all radius=0.025 length=0.1
    Body tibia_r: mass=3.7075 mass_center=(0 -0.1867 0) inertia=(0.0504 0.0051 0.0511 0 0 0)
        meshes=(r_tibia.vtp r_fibula.vtp)
      WrapCylinder GasMed_at_shank_r: xyz_body_rotation=(2.96723 0.0279725 -1.47812)
          translation=(-0.0074 -0.074 -0.0033) quadrant=-y radius=0.059 length=0.1
      WrapCylinder SM_at_condyles_r: xyz_body_rotation=(0 -0.1 0) translation=(-0.001 -0.02 0) quadrant=all
          radius=0.0345 length=0.1
      WrapCylinder BF140_at_gastroc_r: translation=(-0.039 -0.06 0) quadrant=y radius=0.029 length=0.15
    Body patella_r: mass=0.0862 mass_center=(0.0018 0.0264 0) inertia=(2.87e-6 1.311e-5 1.311e-5 0 0 0)
        meshes=r_patella.vtp
    Body talus_r: mass=0.1 mass_center=(0 0 0) inertia=(0.001 0.001 0.001 0 0 0) meshes=r_talus.vtp
    Body calcn_r: mass=1.25 mass_center=(0.1 0.03 0) inertia=(0.0014 0.0039 0.0041 0 0 0) meshes=r_foot.vtp
      PhysicalOffsetFrame heel_r_cnctFrame: socket_parent=.. translation=(0.01 0.02 -0.005)
    Body toes_r: mass=0.2166 mass_center=(0.0346 0.006 -0.0175) inertia=(0.0001 0.0002 0.001 0 0 0) meshes=r_bofoot.vtp
      PhysicalOffsetFrame toes_r_cnctFrame: socket_parent=.. translation=(0.04 0.02 0.014)
    Body femur_l: mass=9.3014 mass_center=(0 -0.17 0) inertia=(0.1339 0.0351 0.1412 0 0 0) meshes=l_femur.vtp
      WrapCylinder GasMed_at_condyles_l: translation=(0.005 -0.41 0) quadrant=all radius=0.025 length=0.1
      WrapCylinder KnExt_at_fem_l: xyz_body_rotation=(0.0623366 -0.0507601 0)
          translation=(0.00358828 -0.402732 -0.00209111) quadrant=all radius=0.025 length=0.1
    Body tibia_l: mass=3.7075 mass_center=(0 -0.1867 0) inertia=(0.0504 0.0051 0.0511 0 0 0)
        meshes=(l_tibia.vtp l_fibula.vtp)
      WrapCylinder GasMed_at_shank_l: xyz_body_rotation=(-2.96723 -0.0279725 -1.47812)
          translation=(-0.0074 -0.074 0.0033) quadrant=-y radius=0.059 length=0.1
      WrapCylinder SM_at_condyles_l: xyz_body_rotation=(0 0.1 0) translation=(-0.001 -0.02 0) quadrant=all
          radius=0.0345 length=0.1
      WrapCylinder BF140_at_gastroc_l: translation=(-0.039 -0.06 0) quadrant=y radius=0.029 length=0.15
    Body patella_l: mass=0.0862 mass_center=(0.0018 0.0264 0) inertia=(2.87e-6 1.311e-5 1.311e-5 0 0 0)
        meshes=l_pat.vtp
    Body talus_l: mass=0.1 mass_center=(0 0 0) inertia=(0.001 0.001 0.001 0 0 0) meshes=l_talus.vtp
    Body calcn_l: mass=1.25 mass_center=(0.1 0.03 0) inertia=(0.0014 0.0039 0.0041 0 0 0) meshes=l_foot.vtp
      PhysicalOffsetFrame heel_l_cnctFrame: socket_parent=.. translation=(0.01 0.02 0.005)
    Body toes_l: mass=0.2166 mass_center=(0.0346 0.006 0.0175) inertia=(0.0001 0.0002 0.001 0 0 0) meshes=l_bofoot.vtp
      PhysicalOffsetFrame toes_l_cnctFrame: socket_parent=.. translation=(0.04 0.02 -0.014)
    Body lumbar5: mass=1.824 mass_center=(0.01728 0.0183 0) inertia=(0.178216 0.0217274 0.171486 0 0 0)
        meshes=lumbar5.vtp
    Body lumbar4: mass=1.799 mass_center=(0.0186 0.0217953 0) inertia=(0.171208 0.0206792 0.165178 0 0 0)
        meshes=lumbar4.vtp
    Body lumbar3: mass=1.67 mass_center=(0.0178939 0.0232739 0) inertia=(0.157697 0.0199107 0.152447 0 0 0)
        meshes=lumbar3.vtp
    Body lumbar2: mass=1.689 mass_center=(0.0252462 0.0202124 0) inertia=(0.162705 0.0219751 0.157705 0 0 0)
        meshes=lumbar2.vtp
    Body lumbar1: mass=1.677 mass_center=(0.03274 0.0194073 0) inertia=(0.162657 0.0241312 0.157927 0 0 0)
        meshes=lumbar1.vtp
    Body torso: mass=25.5776 mass_center=(-0.03 0.32 0) inertia=(1.19239 0.513346 1.1632 0 0 0)
        meshes=(cerv1sm.vtp cerv2sm.vtp cerv3sm.vtp cerv4sm.vtp cerv5sm.vtp cerv6sm.vtp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)
  JointSet:
    CustomJoint ground_pelvis: socket_parent_frame=ground_offset socket_child_frame=pelvis_offset
      Coordinate pelvis_tilt: default_value=-9.560063e-13 range=(-1.570796 1.570796) clamped=true
      Coordinate pelvis_tx: default_value=6.361732e-12 range=(-5 5) clamped=true
      Coordinate pelvis_ty: default_value=0.5555007 range=(-1 2) clamped=true
      PhysicalOffsetFrame ground_offset: socket_parent=/ground translation=(0 0 0)
      PhysicalOffsetFrame pelvis_offset: socket_parent=/bodyset/pelvis translation=(0 0 0)
      SpatialTransform: axes_held_at_zero=(rotation2 rotation3 translation3)
        TransformAxis rotation1: coordinates=pelvis_tilt axis=(0 0 1) LinearFunction(coefficients=1 0)
        TransformAxis translation1: coordinates=pelvis_tx axis=(1 0 0) LinearFunction(coefficients=1 0)
        TransformAxis translation2: coordinates=pelvis_ty axis=(0 1 0) LinearFunction(coefficients=1 0)
    PinJoint hip_r: socket_parent_frame=pelvis_offset socket_child_frame=femur_r_offset
      Coordinate hip_flexion_r: default_value=1.51847 range=(-0.5235988 1.91986) clamped=true
      PhysicalOffsetFrame pelvis_offset: socket_parent=/bodyset/pelvis translation=(-0.056276 -0.07849 0.07726)
      PhysicalOffsetFrame femur_r_offset: socket_parent=/bodyset/femur_r translation=(0 0 0)
    CustomJoint walker_knee_r: socket_parent_frame=femur_r_offset socket_child_frame=tibia_r_offset
      Coordinate knee_angle_r: default_value=1.480544 range=(0 2.443461) clamped=true
      PhysicalOffsetFrame femur_r_offset: socket_parent=/bodyset/femur_r translation=(-0.0045 -0.4096 -0.00175)
          orientation=(-1.64157 1.44618 1.5708)
      PhysicalOffsetFrame tibia_r_offset: socket_parent=/bodyset/tibia_r
          translation=(-0.00808954 -0.0035348 -0.00148474) orientation=(-1.64157 1.44618 1.5708)
      SpatialTransform:
        TransformAxis rotation1: coordinates=knee_angle_r axis=(1 0 0) LinearFunction(coefficients=1 0)
        TransformAxis rotation2: coordinates=knee_angle_r axis=(0 0 1)
          SimmSpline: x=(0 0.174533 0.349066 0.523599 0.698132 0.872665 1.0472 1.22173 1.39626 1.5708 1.74533 1.91986 2.0944)
              y=(0 0.0126809 0.0226969 0.0296054 0.0332049 0.0335354 0.0308779 0.0257548 0.0189295 0.011407 0.00443314 -0.00050475 -0.0016782)
        TransformAxis rotation3: coordinates=knee_angle_r axis=(0 1 0)
          SimmSpline: x=(0 0.174533 0.349066 0.523599 0.698132 0.872665 1.0472 1.22173 1.39626 1.5708 1.74533 1.91986 2.0944)
              y=(0 0.059461 0.109399 0.150618 0.18392 0.210107 0.229983 0.24435 0.254012 0.25977 0.262428 0.262788 0.261654)
        TransformAxis translation1: coordinates=knee_angle_r axis=(1 0 0)
          SimmSpline: x=(0 0.174533 0.349066 0.523599 0.698132 0.872665 1.0472 1.22173 1.39626 1.5708 1.74533 1.91986 2.0944)
              y=(0 5.3e-5 0.000188 0.000378 0.000597 0.000825 0.001045 0.001247 0.00142 0.001558 0.001661 0.001728 0.00176)
        TransformAxis translation2: coordinates=knee_angle_r axis=(0 1 0)
          SimmSpline: x=(0 0.174533 0.349066 0.523599 0.698132 0.872665 1.0472 1.22173 1.39626 1.5708 1.74533 1.91986 2.0944)
              y=(0 0.000301 0.000143 -0.000401 -0.001233 -0.002243 -0.003316 -0.004346 -0.005239 -0.005924 -0.006361 -0.006539 -0.00648)
        TransformAxis translation3: coordinates=knee_angle_r axis=(0 0 1)
          SimmSpline: x=(0 0.174533 0.349066 0.523599 0.698132 0.872665 1.0472 1.22173 1.39626 1.5708 1.74533 1.91986 2.0944)
              y=(0 0.001055 0.002061 0.00289 0.003447 0.003676 0.003559 0.00311 0.002373 0.001418 0.000329 -0.000805 -0.001898)
    CustomJoint patellofemoral_r: socket_parent_frame=femur_r_offset socket_child_frame=patella_r_offset
      Coordinate knee_angle_r_beta: default_value=1.480544 range=(-99999.9 99999.9) clamped=false
      PhysicalOffsetFrame femur_r_offset: socket_parent=/bodyset/femur_r translation=(-0.00809 -0.40796 -0.00275)
      PhysicalOffsetFrame patella_r_offset: socket_parent=/bodyset/patella_r translation=(0 0 0)
      SpatialTransform: axes_held_at_zero=(rotation2 rotation3)
        TransformAxis rotation1: coordinates=knee_angle_r_beta axis=(0 0 1)
          SimmSpline: x=(0 0.174533 0.349066 0.523599 0.698132 0.872665 1.0472 1.22173 1.39626 1.5708 1.74533 1.91986 2.0944)
              y=(0.00113686 -0.00629212 -0.105582 -0.253683 -0.414245 -0.579047 -0.747244 -0.91799 -1.09044 -1.26379 -1.43763 -1.61186 -1.78634)
        TransformAxis translation1: coordinates=knee_angle_r_beta axis=(1 0 0)
          SimmSpline: x=(0 0.174533 0.349066 0.523599 0.698132 0.872665 1.0472 1.22173 1.39626 1.5708 1.74533 1.91986 2.0944)
              y=(0.0524 0.0488 0.0437 0.0371 0.0296 0.0216 0.0136 0.0057 -0.0019 -0.0088 -0.0148 -0.0196 -0.0227)
        TransformAxis translation2: coordinates=knee_angle_r_beta axis=(0 1 0)
          SimmSpline: x=(0 0.174533 0.349066 0.523599 0.698132 0.872665 1.0472 1.22173 1.39626 1.5708 1.74533 1.91986 2.0944)
              y=(-0.0108 -0.019 -0.0263 -0.0322 -0.0367 -0.0395 -0.0408 -0.0404 -0.0384 -0.0349 -0.0301 -0.0245 -0.0187)
        TransformAxis translation3: axis=(0 0 1) Constant(value=0.00275)
    PinJoint ankle_r: socket_parent_frame=tibia_r_offset socket_child_frame=talus_r_offset
      Coordinate ankle_angle_r: default_value=-0.01556225 range=(-0.6981317 0.5235988) clamped=true
      PhysicalOffsetFrame tibia_r_offset: socket_parent=/bodyset/tibia_r translation=(-0.01 -0.4 0)
          orientation=(0.175895 -0.105208 0.0186622)
      PhysicalOffsetFrame talus_r_offset: socket_parent=/bodyset/talus_r translation=(0 0 0)
          orientation=(0.175895 -0.105208 0.0186622)
    WeldJoint subtalar_r: socket_parent_frame=talus_r_offset socket_child_frame=calcn_r_offset
      PhysicalOffsetFrame talus_r_offset: socket_parent=/bodyset/talus_r translation=(-0.04877 -0.04195 0.00792)
          orientation=(-1.76819 0.906223 1.8196)
      PhysicalOffsetFrame calcn_r_offset: socket_parent=/bodyset/calcn_r translation=(0 0 0)
          orientation=(-1.76819 0.906223 1.8196)
    WeldJoint mtp_r: socket_parent_frame=calcn_r_offset socket_child_frame=toes_r_offset
      PhysicalOffsetFrame calcn_r_offset: socket_parent=/bodyset/calcn_r translation=(0.1788 -0.002 0.00108)
          orientation=(-3.14159 0.619901 0)
      PhysicalOffsetFrame toes_r_offset: socket_parent=/bodyset/toes_r translation=(0 0 0)
          orientation=(-3.14159 0.619901 0)
    PinJoint hip_l: socket_parent_frame=pelvis_offset socket_child_frame=femur_l_offset
      Coordinate hip_flexion_l: default_value=1.518478 range=(-0.5235988 1.91986) clamped=true
      PhysicalOffsetFrame pelvis_offset: socket_parent=/bodyset/pelvis translation=(-0.056276 -0.07849 -0.07726)
      PhysicalOffsetFrame femur_l_offset: socket_parent=/bodyset/femur_l translation=(0 0 0)
    CustomJoint walker_knee_l: socket_parent_frame=femur_l_offset socket_child_frame=tibia_l_offset
      Coordinate knee_angle_l: default_value=1.480699 range=(0 2.443461) clamped=true
      PhysicalOffsetFrame femur_l_offset: socket_parent=/bodyset/femur_l translation=(-0.0045 -0.4096 0.00175)
          orientation=(1.64157 -1.44618 1.5708)
      PhysicalOffsetFrame tibia_l_offset: socket_parent=/bodyset/tibia_l
          translation=(-0.00808954 -0.0035348 0.00148474) orientation=(1.64157 -1.44618 1.5708)
      SpatialTransform:
        TransformAxis rotation1: coordinates=knee_angle_l axis=(-1 0 0) LinearFunction(coefficients=1 0)
        TransformAxis rotation2: coordinates=knee_angle_l axis=(0 0 1)
          SimmSpline: x=(0 0.174533 0.349066 0.523599 0.698132 0.872665 1.0472 1.22173 1.39626 1.5708 1.74533 1.91986 2.0944)
              y=(0 0.0126809 0.0226969 0.0296054 0.0332049 0.0335354 0.0308779 0.0257548 0.0189295 0.011407 0.00443314 -0.00050475 -0.0016782)
        TransformAxis rotation3: coordinates=knee_angle_l axis=(0 1 0)
          SimmSpline: x=(0 0.174533 0.349066 0.523599 0.698132 0.872665 1.0472 1.22173 1.39626 1.5708 1.74533 1.91986 2.0944)
              y=(0 -0.059461 -0.109399 -0.150618 -0.18392 -0.210107 -0.229983 -0.24435 -0.254012 -0.25977 -0.262428 -0.262788 -0.261654)
        TransformAxis translation1: coordinates=knee_angle_l axis=(1 0 0)
          SimmSpline: x=(0 0.174533 0.349066 0.523599 0.698132 0.872665 1.0472 1.22173 1.39626 1.5708 1.74533 1.91986 2.0944)
              y=(0 5.3e-5 0.000188 0.000378 0.000597 0.000825 0.001045 0.001247 0.00142 0.001558 0.001661 0.001728 0.00176)
        TransformAxis translation2: coordinates=knee_angle_l axis=(0 1 0)
          SimmSpline: x=(0 0.174533 0.349066 0.523599 0.698132 0.872665 1.0472 1.22173 1.39626 1.5708 1.74533 1.91986 2.0944)
              y=(0 0.000301 0.000143 -0.000401 -0.001233 -0.002243 -0.003316 -0.004346 -0.005239 -0.005924 -0.006361 -0.006539 -0.00648)
        TransformAxis translation3: coordinates=knee_angle_l axis=(0 0 1)
          SimmSpline: x=(0 0.174533 0.349066 0.523599 0.698132 0.872665 1.0472 1.22173 1.39626 1.5708 1.74533 1.91986 2.0944)
              y=(0 -0.001055 -0.002061 -0.00289 -0.003447 -0.003676 -0.003559 -0.00311 -0.002373 -0.001418 -0.000329 0.000805 0.001898)
    CustomJoint patellofemoral_l: socket_parent_frame=femur_l_offset socket_child_frame=patella_l_offset
      Coordinate knee_angle_l_beta: default_value=1.480699 range=(-99999.9 99999.9) clamped=false
      PhysicalOffsetFrame femur_l_offset: socket_parent=/bodyset/femur_l translation=(-0.00809 -0.40796 0.00275)
      PhysicalOffsetFrame patella_l_offset: socket_parent=/bodyset/patella_l translation=(0 0 0)
      SpatialTransform: axes_held_at_zero=(rotation2 rotation3)
        TransformAxis rotation1: coordinates=knee_angle_l_beta axis=(0 0 1)
          SimmSpline: x=(0 0.174533 0.349066 0.523599 0.698132 0.872665 1.0472 1.22173 1.39626 1.5708 1.74533 1.91986 2.0944)
              y=(0.00113686 -0.00629212 -0.105582 -0.253683 -0.414245 -0.579047 -0.747244 -0.91799 -1.09044 -1.26379 -1.43763 -1.61186 -1.78634)
        TransformAxis translation1: coordinates=knee_angle_l_beta axis=(1 0 0)
          SimmSpline: x=(0 0.174533 0.349066 0.523599 0.698132 0.872665 1.0472 1.22173 1.39626 1.5708 1.74533 1.91986 2.0944)
              y=(0.0524 0.0488 0.0437 0.0371 0.0296 0.0216 0.0136 0.0057 -0.0019 -0.0088 -0.0148 -0.0196 -0.0227)
        TransformAxis translation2: coordinates=knee_angle_l_beta axis=(0 1 0)
          SimmSpline: x=(0 0.174533 0.349066 0.523599 0.698132 0.872665 1.0472 1.22173 1.39626 1.5708 1.74533 1.91986 2.0944)
              y=(-0.0108 -0.019 -0.0263 -0.0322 -0.0367 -0.0395 -0.0408 -0.0404 -0.0384 -0.0349 -0.0301 -0.0245 -0.0187)
        TransformAxis translation3: axis=(0 0 1) Constant(value=-0.00275)
    PinJoint ankle_l: socket_parent_frame=tibia_l_offset socket_child_frame=talus_l_offset
      Coordinate ankle_angle_l: default_value=-0.01541264 range=(-0.6981317 0.5235988) clamped=true
      PhysicalOffsetFrame tibia_l_offset: socket_parent=/bodyset/tibia_l translation=(-0.01 -0.4 0)
          orientation=(-0.175895 0.105208 0.0186622)
      PhysicalOffsetFrame talus_l_offset: socket_parent=/bodyset/talus_l translation=(0 0 0)
          orientation=(-0.175895 0.105208 0.0186622)
    WeldJoint subtalar_l: socket_parent_frame=talus_l_offset socket_child_frame=calcn_l_offset
      PhysicalOffsetFrame talus_l_offset: socket_parent=/bodyset/talus_l translation=(-0.04877 -0.04195 -0.00792)
          orientation=(1.76819 -0.906223 1.8196)
      PhysicalOffsetFrame calcn_l_offset: socket_parent=/bodyset/calcn_l translation=(0 0 0)
          orientation=(1.76819 -0.906223 1.8196)
    WeldJoint mtp_l: socket_parent_frame=calcn_l_offset socket_child_frame=toes_l_offset
      PhysicalOffsetFrame calcn_l_offset: socket_parent=/bodyset/calcn_l translation=(0.1788 -0.002 -0.00108)
          orientation=(3.14159 -0.619901 0)
      PhysicalOffsetFrame toes_l_offset: socket_parent=/bodyset/toes_l translation=(0 0 0)
          orientation=(3.14159 -0.619901 0)
    WeldJoint sacrumjnt: socket_parent_frame=pelvis_offset socket_child_frame=sacrum_offset
      PhysicalOffsetFrame pelvis_offset: socket_parent=/bodyset/pelvis translation=(0.01 -0.017 0)
      PhysicalOffsetFrame sacrum_offset: socket_parent=/bodyset/sacrum translation=(0 0 0)
    PinJoint L5_S1_IVDjnt: socket_parent_frame=sacrum_offset socket_child_frame=lumbar5_offset
      Coordinate flex_extension: default_value=-0.08726646 range=(-0.785398 0.261799) clamped=true
      PhysicalOffsetFrame sacrum_offset: socket_parent=/bodyset/sacrum translation=(-0.098 0.071 0)
      PhysicalOffsetFrame lumbar5_offset: socket_parent=/bodyset/lumbar5 translation=(0 0 0)
    PinJoint L4_L5_IVDjnt: socket_parent_frame=lumbar5_offset socket_child_frame=lumbar4_offset
      Coordinate L4_L5_IVDjnt_r3: default_value=-0.01256637 range=(-99999.9 99999.9) clamped=false
      PhysicalOffsetFrame lumbar5_offset: socket_parent=/bodyset/lumbar5 translation=(0.01 0.0296 0)
      PhysicalOffsetFrame lumbar4_offset: socket_parent=/bodyset/lumbar4 translation=(0.001 -0.0025 0)
    PinJoint L3_L4_IVDjnt: socket_parent_frame=lumbar4_offset socket_child_frame=lumbar3_offset
      Coordinate L3_L4_IVDjnt_r3: default_value=-0.01786737 range=(-99999.9 99999.9) clamped=false
      PhysicalOffsetFrame lumbar4_offset: socket_parent=/bodyset/lumbar4 translation=(0 0.032 0)
      PhysicalOffsetFrame lumbar3_offset: socket_parent=/bodyset/lumbar3 translation=(-0.0006 -0.0012 0)
    PinJoint L2_L3_IVD_jnt: socket_parent_frame=lumbar3_offset socket_child_frame=lumbar2_offset
      Coordinate L2_L3_IVDjnt_r3: default_value=-0.02152148 range=(-99999.9 99999.9) clamped=false
      PhysicalOffsetFrame lumbar3_offset: socket_parent=/bodyset/lumbar3 translation=(-0.008 0.0312 0)
      PhysicalOffsetFrame lumbar2_offset: socket_parent=/bodyset/lumbar2 translation=(-0.0013 -0.0039 0)
    PinJoint L1_L2_IVD_jnt: socket_parent_frame=lumbar2_offset socket_child_frame=lumbar1_offset
      Coordinate L1_L2_IVDjnt_r3: default_value=-0.02567222 range=(-99999.9 99999.9) clamped=false
      PhysicalOffsetFrame lumbar2_offset: socket_parent=/bodyset/lumbar2 translation=(-0.01 0.025 0)
      PhysicalOffsetFrame lumbar1_offset: socket_parent=/bodyset/lumbar1 translation=(0.0014 -0.0038 0)
    WeldJoint Torsojnt: socket_parent_frame=lumbar1_offset socket_child_frame=torso_offset
      PhysicalOffsetFrame lumbar1_offset: socket_parent=/bodyset/lumbar1 translation=(0.0025 -0.09 0)
      PhysicalOffsetFrame torso_offset: socket_parent=/bodyset/torso translation=(0 0 0)
  ConstraintSet:
    CoordinateCouplerConstraint patellofemoral_knee_angle_r_con: independent_coordinate_names=knee_angle_r
        dependent_coordinate_name=knee_angle_r_beta scale_factor=1
        coupled_coordinates_function=LinearFunction(coefficients=1 0)
    CoordinateCouplerConstraint patellofemoral_knee_angle_l_con: independent_coordinate_names=knee_angle_l
        dependent_coordinate_name=knee_angle_l_beta scale_factor=1
        coupled_coordinates_function=LinearFunction(coefficients=1 0)
    CoordinateCouplerConstraint L4_L5_IVDjnt_r3_con: independent_coordinate_names=flex_extension
        dependent_coordinate_name=L4_L5_IVDjnt_r3 scale_factor=1
        coupled_coordinates_function=LinearFunction(coefficients=0.144 0)
    CoordinateCouplerConstraint L3_L4_IVDjnt_r3_con: independent_coordinate_names=flex_extension
        dependent_coordinate_name=L3_L4_IVDjnt_r3 scale_factor=1
        coupled_coordinates_function=LinearFunction(coefficients=0.204745 0)
    CoordinateCouplerConstraint L2_L3_IVDjnt_r3_con: independent_coordinate_names=flex_extension
        dependent_coordinate_name=L2_L3_IVDjnt_r3 scale_factor=1
        coupled_coordinates_function=LinearFunction(coefficients=0.246618 0)
    CoordinateCouplerConstraint L1_L2_IVDjnt_r3_con: independent_coordinate_names=flex_extension
        dependent_coordinate_name=L1_L2_IVDjnt_r3 scale_factor=1
        coupled_coordinates_function=LinearFunction(coefficients=0.294182 0)
  ForceSet:
    Millard2012EquilibriumMuscle [values shared by the 22 below unless stated]: default_activation=0.01
        minimum_activation=0.01
      ActiveForceLengthCurve: min_norm_active_fiber_length=0.25 transition_norm_fiber_length=0.77
          max_norm_active_fiber_length=1.9 shallow_ascending_slope=0.75 minimum_value=0
      ForceVelocityCurve: concentric_slope_at_vmax=0 concentric_slope_near_vmax=0.25 isometric_slope=5
          eccentric_slope_at_vmax=0 eccentric_slope_near_vmax=0.15 max_eccentric_velocity_force_multiplier=1.4
      FiberForceLengthCurve: strain_at_zero_force=0 strain_at_one_norm_force=0.7
      TendonForceLengthCurve
    Millard2012EquilibriumMuscle semimem_r: max_isometric_force=4105.466 optimal_fiber_length=0.086
        tendon_slack_length=0.335 pennation_angle_at_optimal=0.2545615 [radians] fiber_damping=0.01
      PathPoint P1: pelvis (-0.0987 -0.114 0.0614)
      PathPoint P2: tibia_r (-0.027 -0.041 -0.0196)
      PathWrap: wrap_object=SM_at_condyles_r method=hybrid
    Millard2012EquilibriumMuscle bfsh140_r: max_isometric_force=557.1148 optimal_fiber_length=0.1103
        tendon_slack_length=0.1058172 pennation_angle_at_optimal=0.2642232 ignore_tendon_compliance=true
        fiber_damping=0.01
      PathPoint bfsh_r-P1: femur_r (0.005 -0.2111 0.0234)
      PathPoint bfsh_r-P2: tibia_r (-0.02866 -0.03284 0.03204)
      PathWrap: wrap_object=BF140_at_gastroc_r method=hybrid
    Millard2012EquilibriumMuscle gasmed_r: max_isometric_force=4690.574 optimal_fiber_length=0.059
        tendon_slack_length=0.387 pennation_angle_at_optimal=0.1656816 fiber_damping=0.01
      PathPoint P1: femur_r (0.006 -0.385 -0.022)
      PathPoint P2: calcn_r (0.0044 0.031 -0.0053)
      PathWrap: wrap_object=GasMed_at_shank_r method=hybrid
      PathWrap pathwrap_0: wrap_object=GasMed_at_condyles_r method=hybrid
    Millard2012EquilibriumMuscle glmax2_r: max_isometric_force=3337.584 optimal_fiber_length=0.157
        tendon_slack_length=0.109 pennation_angle_at_optimal=0.3673821 ignore_tendon_compliance=true fiber_damping=0.01
      PathPoint P1: pelvis (-0.1317 0.0087 0.0462)
      PathPoint P2: pelvis (-0.1344 -0.0609 0.0813)
      PathPoint P3: femur_r (-0.045 -0.0584 0.0252)
      PathPoint P4: femur_r (-0.0156 -0.1016 0.0419)
      PathWrap: wrap_object=Gmax2_at_pelvis_r method=hybrid
    Millard2012EquilibriumMuscle psoas_r: max_isometric_force=2447.931 optimal_fiber_length=0.1169
        tendon_slack_length=0.09954317 pennation_angle_at_optimal=0.2155251 ignore_tendon_compliance=true
        fiber_damping=0.01
      PathPoint P1: pelvis (-0.0606 0.062 0.039)
      PathPoint P2: pelvis (-0.0205 -0.0654 0.0656)
      PathPoint P3: femur_r (-0.0132 -0.0467 0.0046)
      PathPoint P4: femur_r (-0.0235 -0.0524 0.0088)
      PathWrap: wrap_object=PS_at_brim_r method=hybrid range=(2 3)
    Millard2012EquilibriumMuscle recfem_r: max_isometric_force=2191.741 optimal_fiber_length=0.0759
        tendon_slack_length=0.4504 pennation_angle_at_optimal=0.2170149 fiber_damping=0.01
      PathPoint P1: pelvis (-0.024 -0.0388 0.0933)
      PathPoint P2: patella_r (0.01 0.049 0.0007)
      PathPoint P3: patella_r (0.0121 0.0437 -0.001)
      PathPoint P4: patella_r (0.005 0.00247 3e-5)
      PathPoint P5: tibia_r (0.0326 -0.06312 -0.00047)
      PathWrap: wrap_object=KnExt_at_fem_r method=hybrid
    Millard2012EquilibriumMuscle soleus_r: max_isometric_force=7924.997 optimal_fiber_length=0.044
        tendon_slack_length=0.28135 pennation_angle_at_optimal=0.3814289 fiber_damping=0.01
      PathPoint P1: tibia_r (-0.0076 -0.0916 0.0098)
      PathPoint P2: calcn_r (0.0044 0.031 -0.0053)
    Millard2012EquilibriumMuscle tibant_r: max_isometric_force=2116.818 optimal_fiber_length=0.0683
        tendon_slack_length=0.240461 pennation_angle_at_optimal=0.1951828 fiber_damping=0.01
      PathPoint P1: tibia_r (0.0154 -0.1312 0.0162)
      PathPoint P2: tibia_r (0.0251 -0.1906 0.0128)
      PathPoint P3: tibia_r (0.0233 -0.3659 -0.0132)
      PathPoint P4: calcn_r (0.1166 0.0178 -0.0305)
    Millard2012EquilibriumMuscle vasint_r: max_isometric_force=9593.951 optimal_fiber_length=0.117
        tendon_slack_length=0.205 pennation_angle_at_optimal=0.06309973 fiber_damping=0.01
      PathPoint P1: femur_r (0.029 -0.1924 0.031)
      PathPoint P2: femur_r (0.0335 -0.2084 0.0285)
      PathPoint P3: patella_r (0.0058 0.048 -0.0006)
      PathPoint P4: patella_r (0.005 0.00247 -0.00039)
      PathPoint P5: tibia_r (0.03257 -0.0632 0.00043)
      PathWrap: wrap_object=KnExt_at_fem_r method=hybrid
    Millard2012EquilibriumMuscle rect_abd_r: max_isometric_force=348.76 optimal_fiber_length=0.2238
        tendon_slack_length=0.017 pennation_angle_at_optimal=0 ignore_tendon_compliance=true
        activation_time_constant=0.01 [seconds] deactivation_time_constant=0.04 [seconds]
      PathPoint P1: pelvis (-0.026 -0.07 0.011)
      PathPoint P2: torso (0.092 0.221982 0.031)
      ActiveForceLengthCurve: minimum_value=0
      FiberForceLengthCurve
    Millard2012EquilibriumMuscle ercspn_r: max_isometric_force=2500 optimal_fiber_length=0.12614
        tendon_slack_length=0.19968 pennation_angle_at_optimal=0.2199115
      PathPoint LTpT_t8_R-P1: sacrum (-0.142901 0.0502456 0.00037451)
      PathPoint LTpT_t8_R-P2: lumbar4 (-0.0469739 0.0180443 0.00565735)
      PathPoint LTpT_t8_R-P3: lumbar3 (-0.0467498 0.0135459 0.00831636)
      PathPoint LTpT_t8_R-P2_0: lumbar2 (-0.0453159 0.00310151 0.01094)
      PathPoint LTpT_t8_R-P2_1: torso (-0.079 0.241 0.0255)
      ActiveForceLengthCurve: minimum_value=0
      FiberForceLengthCurve
    Millard2012EquilibriumMuscle semimem_l: max_isometric_force=4105.466 optimal_fiber_length=0.086
        tendon_slack_length=0.335 pennation_angle_at_optimal=0.2545615 fiber_damping=0.01
      PathPoint P1: pelvis (-0.0987 -0.114 -0.0614)
      PathPoint P2: tibia_l (-0.027 -0.041 0.0196)
      PathWrap: wrap_object=SM_at_condyles_l method=hybrid
    Millard2012EquilibriumMuscle bfsh140_l: max_isometric_force=557.1148 optimal_fiber_length=0.1103
        tendon_slack_length=0.1058172 pennation_angle_at_optimal=0.2642232 ignore_tendon_compliance=true
        fiber_damping=0.01
      PathPoint bfsh_l-P1: femur_l (0.005 -0.2111 -0.0234)
      PathPoint bfsh_l-P2: tibia_l (-0.02866 -0.03284 -0.03204)
      PathWrap: wrap_object=BF140_at_gastroc_l method=hybrid
    Millard2012EquilibriumMuscle gasmed_l: max_isometric_force=4690.574 optimal_fiber_length=0.059
        tendon_slack_length=0.387 pennation_angle_at_optimal=0.1656816 fiber_damping=0.01
      PathPoint P1: femur_l (0.006 -0.385 0.022)
      PathPoint P2: calcn_l (0.0044 0.031 0.0053)
      PathWrap: wrap_object=GasMed_at_shank_l method=hybrid
      PathWrap pathwrap_0: wrap_object=GasMed_at_condyles_l method=hybrid
    Millard2012EquilibriumMuscle glmax2_l: max_isometric_force=3337.584 optimal_fiber_length=0.157
        tendon_slack_length=0.109 pennation_angle_at_optimal=0.3673821 ignore_tendon_compliance=true fiber_damping=0.01
      PathPoint P1: pelvis (-0.1317 0.0087 -0.0462)
      PathPoint P2: pelvis (-0.1344 -0.0609 -0.0813)
      PathPoint P3: femur_l (-0.045 -0.0584 -0.0252)
      PathPoint P4: femur_l (-0.0156 -0.1016 -0.0419)
      PathWrap: wrap_object=Gmax2_at_pelvis_l method=hybrid
    Millard2012EquilibriumMuscle psoas_l: max_isometric_force=2447.931 optimal_fiber_length=0.1169
        tendon_slack_length=0.09954317 pennation_angle_at_optimal=0.2155251 ignore_tendon_compliance=true
        fiber_damping=0.01
      PathPoint P1: pelvis (-0.0606 0.062 -0.039)
      PathPoint P2: pelvis (-0.0205 -0.0654 -0.0656)
      PathPoint P3: femur_l (-0.0132 -0.0467 -0.0046)
      PathPoint P4: femur_l (-0.0235 -0.0524 -0.0088)
      PathWrap: wrap_object=PS_at_brim_l method=hybrid range=(2 3)
    Millard2012EquilibriumMuscle recfem_l: max_isometric_force=2191.741 optimal_fiber_length=0.0759
        tendon_slack_length=0.4504 pennation_angle_at_optimal=0.2170149 fiber_damping=0.01
      PathPoint P1: pelvis (-0.024 -0.0388 -0.0933)
      PathPoint P2: patella_l (0.01 0.049 -0.0007)
      PathPoint P3: patella_l (0.0121 0.0437 0.001)
      PathPoint P4: patella_l (0.005 0.00247 -3e-5)
      PathPoint P5: tibia_l (0.0326 -0.06312 0.00047)
      PathWrap: wrap_object=KnExt_at_fem_l method=hybrid
    Millard2012EquilibriumMuscle soleus_l: max_isometric_force=7924.997 optimal_fiber_length=0.044
        tendon_slack_length=0.28135 pennation_angle_at_optimal=0.3814289 fiber_damping=0.01
      PathPoint P1: tibia_l (-0.0076 -0.0916 -0.0098)
      PathPoint P2: calcn_l (0.0044 0.031 0.0053)
    Millard2012EquilibriumMuscle tibant_l: max_isometric_force=2116.818 optimal_fiber_length=0.0683
        tendon_slack_length=0.240461 pennation_angle_at_optimal=0.1951828 fiber_damping=0.01
      PathPoint P1: tibia_l (0.0154 -0.1312 -0.0162)
      PathPoint P2: tibia_l (0.0251 -0.1906 -0.0128)
      PathPoint P3: tibia_l (0.0233 -0.3659 0.0132)
      PathPoint P4: calcn_l (0.1166 0.0178 0.0305)
    Millard2012EquilibriumMuscle vasint_l: max_isometric_force=9593.951 optimal_fiber_length=0.117
        tendon_slack_length=0.205 pennation_angle_at_optimal=0.06309973 fiber_damping=0.01
      PathPoint P1: femur_l (0.029 -0.1924 -0.031)
      PathPoint P2: femur_l (0.0335 -0.2084 -0.0285)
      PathPoint P3: patella_l (0.0058 0.048 0.0006)
      PathPoint P4: patella_l (0.005 0.00247 0.00039)
      PathPoint P5: tibia_l (0.03257 -0.0632 -0.00043)
      PathWrap: wrap_object=KnExt_at_fem_l method=hybrid
    Millard2012EquilibriumMuscle rect_abd_l: max_isometric_force=348.76 optimal_fiber_length=0.2238
        tendon_slack_length=0.017 pennation_angle_at_optimal=0 ignore_tendon_compliance=true
        activation_time_constant=0.01 deactivation_time_constant=0.04
      PathPoint P1: pelvis (-0.026 -0.07 -0.011)
      PathPoint P2: torso (0.092 0.221663 -0.031)
      ActiveForceLengthCurve: minimum_value=0
      FiberForceLengthCurve
    Millard2012EquilibriumMuscle ercspn_l: max_isometric_force=2500 optimal_fiber_length=0.12614
        tendon_slack_length=0.19968 pennation_angle_at_optimal=0.2199115
      PathPoint LTpT_t8_R-P1: sacrum (-0.142901 0.0502456 -0.00037)
      PathPoint LTpT_t8_R-P2: lumbar4 (-0.0469739 0.0180443 -0.00566)
      PathPoint LTpT_t8_R-P3: lumbar3 (-0.0467498 0.0135459 -0.00832)
      PathPoint LTpT_t8_R-P2_0: lumbar2 (-0.0453159 0.00310151 -0.01094)
      PathPoint LTpT_t8_R-P2_1: torso (-0.079 0.241 -0.0255)
      ActiveForceLengthCurve: minimum_value=0
      FiberForceLengthCurve
    HuntCrossleyForce feetForce_r: transition_velocity=0.1
      ContactParametersSet contact_parameters:
        ContactParameters: geometry=(floor toes_r_cnctSphere heel_r_cnctSphere) stiffness=2000000 dissipation=1
            static_friction=0.9 dynamic_friction=0.8 viscous_friction=0.6
    HuntCrossleyForce feetForce_l: transition_velocity=0.1
      ContactParametersSet contact_parameters:
        ContactParameters: geometry=(floor toes_l_cnctSphere heel_l_cnctSphere) stiffness=2000000 dissipation=1
            static_friction=0.9 dynamic_friction=0.8 viscous_friction=0.6
    CoordinateLimitForce [values shared by the 7 below unless stated]: upper_stiffness=20 [N*m/degree]
        lower_stiffness=20 [N*m/degree] damping=0.2 transition=0.01 [degrees] compute_dissipation_energy=false
    CoordinateLimitForce hip_flexion_r_LimitForce: coordinate=hip_flexion_r upper_limit=109.9999 [degrees]
        lower_limit=-30 [degrees]
    CoordinateLimitForce knee_angle_r_LimitForce: coordinate=knee_angle_r upper_limit=140 lower_limit=0
    CoordinateLimitForce ankle_angle_r_LimitForce: coordinate=ankle_angle_r upper_limit=30 lower_limit=-40
    CoordinateLimitForce hip_flexion_l_LimitForce: coordinate=hip_flexion_l upper_limit=109.9999 lower_limit=-30
    CoordinateLimitForce knee_angle_l_LimitForce: coordinate=knee_angle_l upper_limit=140 lower_limit=0
    CoordinateLimitForce ankle_angle_l_LimitForce: coordinate=ankle_angle_l upper_limit=30 lower_limit=-40
    CoordinateLimitForce flex_extension_LimitForce: coordinate=flex_extension upper_limit=14.99998
        lower_limit=-44.99999
    ElasticFoundationForce chairForce:
      ContactParametersSet contact_parameters:
        ContactParameters: geometry=(pelvis_cnctEllipse chair) stiffness=2000000 dissipation=1 static_friction=0.9
            dynamic_friction=0.8 viscous_friction=0.6
    ObjectGroup right_leg: members=(semimem_r bfsh140_r gasmed_r glmax2_r psoas_r recfem_r soleus_r tibant_r vasint_r)
    ObjectGroup left_leg: members=(semimem_l bfsh140_l gasmed_l glmax2_l psoas_l recfem_l soleus_l tibant_l vasint_l)
    ObjectGroup hip_flex_r: members=(psoas_r recfem_r)
    ObjectGroup hip_ext_r: members=(semimem_r glmax2_r)
    ObjectGroup knee_flex_r: members=(bfsh140_r gasmed_r soleus_r)
    ObjectGroup knee_ext_r: members=(recfem_r vasint_r)
    ObjectGroup ankle_df_r: members=tibant_r
    ObjectGroup ankle_pf_r: members=(gasmed_r soleus_r)
    ObjectGroup hip_flex_l: members=(psoas_l recfem_l)
    ObjectGroup hip_ext_l: members=(semimem_l glmax2_l)
    ObjectGroup knee_flex_l: members=(bfsh140_l gasmed_l soleus_l)
    ObjectGroup knee_ext_l: members=(recfem_l vasint_l)
    ObjectGroup ankle_df_l: members=tibant_l
    ObjectGroup ankle_pf_l: members=(gasmed_l soleus_l)
    ObjectGroup trunk_flexion: members=(rect_abd_r rect_abd_l)
    ObjectGroup trunk_extension: members=(ercspn_r ercspn_l)
  ContactGeometrySet:
    ContactHalfSpace floor: socket_frame=/ground location=(0 0 0) orientation=(0 0 -1.570796)
    ContactSphere toes_r_cnctSphere: socket_frame=/bodyset/toes_r/toes_r_cnctFrame location=(0 0 0) radius=0.04
    ContactSphere heel_r_cnctSphere: socket_frame=/bodyset/calcn_r/heel_r_cnctFrame location=(0 0 0) radius=0.04
    ContactSphere toes_l_cnctSphere: socket_frame=/bodyset/toes_l/toes_l_cnctFrame location=(0 0 0) radius=0.04
    ContactSphere heel_l_cnctSphere: socket_frame=/bodyset/calcn_l/heel_l_cnctFrame location=(0 0 0) radius=0.04
    ContactHalfSpace chair: socket_frame=/ground/chairContactFrame location=(0 0 0) orientation=(0 0 -1.570796)
    ContactMesh pelvis_cnctEllipse: socket_frame=/bodyset/pelvis/pelvis_cnctFrame location=(0 0 0)
        orientation=(0 1.570796 0) filename=blockMesh.obj
