# OpenSim document version 40000
MarkerSet:
  Marker C7: torso (-0.076 0.42 0)
  Marker L.Acromium: torso (0.0104336 0.429191 -0.139243)
  Marker R.Acromium: torso (0.0104336 0.429191 0.139243)
  Marker Clavicle: torso (0.04 0.38 0)
  Marker Back1: torso (-0.107606 0.304523 0)
  Marker Back2: torso (-0.107606 0.2 0)
  Marker R.Asis: pelvis (0.0114978 0.0197974 0.128)
  Marker L.Asis: pelvis (0.0114978 0.0197974 -0.128)
  Marker R.Psi: pelvis (-0.156069 0.0394098 0.0553998)
  Marker L.Psi: pelvis (-0.156069 0.039541 -0.0553998)
  Marker R.AnkleOut: tibia_r (-0.0103699 -0.381239 0.0513978)
  Marker R.AnkleIn: tibia_r (-0.00102311 -0.383555 -0.0407072)
  Marker R.Heel: calcn_r (-0.0226731 0.0281286 -0.00680222)
  Marker R.Toe: calcn_r (0.186453 0.031901 0.00286075)
  Marker R.KneeOut: femur_r (0.0157499 -0.404039 0.0498872)
  Marker R.KneeIn: femur_r (0.00464751 -0.405541 -0.0487303)
  Marker R.Thigh: femur_r (0.00922578 -0.121377 0.089915)
  Marker R.Tibia: tibia_r (0.0213102 -0.138827 0.0486124)
